Mu_x := F*c*M_x  # error: Esta variable no está definida. Compruebe que el rótulo esté definido correctamente.
Mu_y := F*c*M_y  # error: Esta variable no está definida. Compruebe que el rótulo esté definido correctamente.
# Se sabe que cuando un elemento es sometido puramente a flexión, el momento resistente debe ser mayor o igual al momento último.
M_R ≥ M_U
# También se puede decir que la relación entre el momento último y el momento resistente debe ser menor o igual a 1.
M_U/M_R ≤ 1
# Como las costaneras están sometidas a flexión biaxial, se deben tomar en cuenta la flexión en el eje fuerte, en este caso el eje "y" y la flexión en el eje débil, en este caso el eje "x".
#
# Tomando en cuenta que la suma de las relaciones entre los momentos resistentes y momentos últimos no debe ser mayor que 1.
M_Ux/M_Rx + M_Uy/M_Ry ≤ 1
# Es importante saber que cuando un perfil se pandea al rededor de su eje de menor inercia (eje débil) este no puede flexionarse hacia el eje de mayor inercia (eje fuerte). Por lo que el pandeo lateral torsional no es un estado límite.
#
# Considerando lo anterior, siempre que el perfil sea compacto y formado en frío, la resistencia se evaluará como:
M_Rx := ϕ*f_y*S_x  # error: Esta variable no está definida. Compruebe que el rótulo esté definido correctamente.
M_Ry := ϕ*f_y*S_y  # error: Esta variable no está definida. Compruebe que el rótulo esté definido correctamente.
Datos
S := 90 cm
α := 16.70°
f_y := 65000 lb/in^2
f_y = 4569.95 kg/cm^2
d := 3.30 m
ϕ := 0.9
A_t := 2*S*d = 5.94 m^2
A_tv := 2*S*cos(α)*d = 5.68947 m^2
# [Excel component]
    excel["D5"] := A_t
    excel["B1"] := d
    CM := excel["Hoja1!E8"] kg/m
CM = 25.48 kg/m
CV := (50 kg/m^2)*A_tv/d = 86.204 kg/m
W_U := 1.4*CM + 1.7*CV = 182.219 kg/m
P_U := 1.7*100 kg = 170 kg
W_Ux := W_U*sin(α) = 52.3625 kg/m
W_Uy := W_U*cos(α) = 174.533 kg/m
P_Ux := P_U*sin(α) = 48.8513 kg
P_Uy := P_U*cos(α) = 162.83 kg
I_x := 143.661 cm^4
I_y := 13.287 cm^4
M_Ux := W_Uy*d^2/8 = 237.583 kg*m
c := 7.62 cm
k := 3.704 cm
S_x := 10.91 cm^3
S_y := 3.70 cm^3
M_Uy := 2*(W_Ux*(d/2)^2/8) = 35.6392 kg*m
M_Rx := ϕ*f_y*S_x = 448.724 kg*m
M_Ry := ϕ*f_y*S_y = 152.179 kg*m
M_Ux/M_Rx = 0.529465
M_Uy/M_Ry = 0.234192
M_Ux/M_Rx + M_Uy/M_Ry = 0.763657
