# [Excel component]
    ϕ := excel["B4"]
    ϕ_rad := excel["B5"]
    γ := excel["B3"]
    B := excel["B8"]
    C_u := excel["B6"]
    D := excel["B7"]
    FS := excel["B10"]
γ = 1.29
ϕ = 24.55
π = 3.14159
e = 2.71828
ϕ_rad = 0.428478
B = 1
D = 0.6
C_u = 7.07
q := D*γ = 0.774
N_q := e^((3*π/2 - ϕ_rad)*tan(ϕ_rad))/(2*cos((45 + ϕ/2)°)^2) = 12.107
N_c := cot(ϕ_rad)*(N_q - 1) = 24.3158
N_γ := 2*(N_q + 1)*tan(ϕ_rad) = 11.974
N_γ := 0 = 0
q_0 := 1.3*C_u*N_c + q*N_q + 0.4*γ*B*N_γ = 232.858
q_0n := q_0 - q = 232.084
1.3*C_u*N_c = 223.487
q_d := q_0n/FS = 29.0105
